//expect_errors = ["'HumanModel' when 'Main' was expected", "Model loading skipped"]

//# BEGIN SNIPPET 1
// Default mannequin position values
HumanModel.Mannequin = {
  Posture = {
    Right = {
    };
    Left = {
    };
  };

  PostureVel= {
    Right = {
    };
    Left = {
    };
  };
};
//# END SNIPPET 1
