  // Todo: Write a small description of your model here

Main = {
  // The actual body model goes in this folder
  AnyFolder ArmModel = {

//# BEGIN SNIPPET 1
// Global Reference Frame
AnyFixedRefFrame GlobalRef = {
  viewRefFrame.Visible = On;

  AnyRefNode Shoulder = {
    sRel = {0,0,0};
  };
  AnyRefNode DeltodeusA = {
    sRel = {0.05,0,0};
  };
  AnyRefNode DeltodeusB = {
    sRel = {-0.05,0,0};
  };
  AnyRefNode BicepsLong = {
    sRel = {0.1,0,0};
  };
  AnyRefNode TricepsLong = {
    sRel = {-0.1,0,0};
  };
}; // Global Reference Frame
//# END SNIPPET 1

  // Segments
  AnyFolder Segs = {

    //UpperArm
    AnySeg UpperArm = {
      r0 = {0.0, 0.3, 0.0};
      Axes0 = RotMat(-90*pi/180, z);
      Mass = 2;
      Jii = {0.001, 0.01, 0.01};
      viewRefFrame.Visible = On;
      viewNodes.Visible = On;
      viewInertia.Visible = On;

      AnyRefNode ShoulderNode = {
        sRel = {-0.2,0,0};
      };
      AnyRefNode ElbowNode = {
        sRel = {0.2,0,0};
      };
      AnyRefNode DeltodeusA = {
        sRel = {-0.1,0,0.02};
      };
      AnyRefNode DeltodeusB = {
        sRel = {-0.1,0,-0.02};
      };
      AnyRefNode Brachialis = {
        sRel = {0.1,0,0.01};
      };
      AnyRefNode BicepsShort = {
        sRel = {-0.1,0,0.03};
      };
      AnyRefNode Brachioradialis = {
        sRel = {0.05,0,0.02};
      };
      AnyRefNode TricepsShort = {
        sRel = {-0.1,0,-0.01};
      };
    }; //UpperArm

    // ForeArm
    AnySeg ForeArm = {
      r0 = {0.3, 0.0, 0.0};
      Mass = 2.0;
      Jii = {0.001,0.01,0.01};
      viewRefFrame.Visible = On;
      viewNodes.Visible = On;
      viewInertia.Visible = On;

      AnyRefNode ElbowNode = {
        sRel = {-0.2,0,0};
      };
      AnyRefNode HandNode = {
        sRel = {0.2,0,0};
      };
      AnyRefNode Brachialis = {
        sRel = {-0.1,0,0.02};
      };
      AnyRefNode Brachioradialis = {
        sRel = {0.0,0,0.02};
      };
      AnyRefNode Biceps = {
        sRel = {-0.15,0,0.01};
      };
      AnyRefNode Triceps = {
        sRel = {-0.25,0,-0.05};
      };
   }; // ForeArm

   // Todo: Add the model elements such as
   //       segments, joints, and muscles here.

  }; // Segs folder

  }; // The study: Operations to be performed on the model
  // ArmModel
  AnyBodyStudy ArmStudy = {
    AnyFolder &Model = .ArmModel;
    Gravity = {0.0, -9.81, 0.0};
  };

};
