//# BEGIN SNIPPET 1
AnyFolder Joints = {

  AnyStdJoint SeatPelvis = {
    AnyRefFrame& Seat = Main.Model.Environment.GlobalRef.Hpoint;
    AnyRefFrame& Pelvis = Main.HumanModel.BodyModel.Trunk.SegmentsLumbar.PelvisSeg;
  };
};
//# END SNIPPET 1

AnyFolder Drivers = {

};
