*Heading
Mesh generated from STL
*Node
1, 0.023586701601743698, 0.013439266011118889, -0.0060330955311656
2, 0.02338417060673237, 0.013198205269873142, -0.004351642914116383
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*Element, type=C3D4, ELSET=allelements
1, 6624, 3380, 1859, 1607
2, 1302, 2383, 5474, 5613
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*SOLID SECTION, MATERIAL=BONE, ELSET=allelements
*MATERIAL, NAME=BONE
*ELASTIC, TYPE=ISO
5000000, 0.3, 10
*DENSITY
1.0
