#path __BM_PLUGIN_FILE__ "BodyModelConfigurationFEA.any"
#define BM_CONFIG_PLUGIN __BM_PLUGIN_FILE__

// -----------------------------------------------------------------------------------
// The BodyModel configuration can be modified using BodyModel GUI plugin
// or by manually editing this file.
//
// Please see this this file for more information on the options:
// #path HTML_DOC "<AMMR_PATH_DOC>/bm_config/index.html"
// -----------------------------------------------------------------------------------

//# BEGIN SNIPPET 1
   // switch the muscles off for simplicity
#define BM_LEG_MUSCLES_RIGHT OFF
#define BM_LEG_MUSCLES_LEFT OFF

#define BM_ARM_MUSCLES_RIGHT OFF
#define BM_ARM_MUSCLES_LEFT OFF

#define BM_TRUNK_MUSCLES OFF
//# END SNIPPET 1
