// Todo: Write a small description of your model here
//# BEGIN SNIPPET 1
Main = {

  // The actual body model goes in this folder
  AnyFolder MyModel = {

    // Global Reference Frame
    AnyFixedRefFrame GlobalRef = {

    };

    AnyInputC3D C3D =
    {
      FileName = "multiple.c3d";
      //ReadAllDataOnOff = On;
      //TruncateExtraCharsInNamesOnOff = On;
      //MakeNameUniqueStr = "_";
      //PointsScaleFactor = 1.0;
      //ConstructModelOnOff = On;
      ConstructChartOnOff = Off;
      //ConstructWeightFunUsingResidualOnOff = Off;
      //GapFillUsingResidualsOnOff = Off;
      //MarkerUseAllPointsOnOff = Off;
      //MarkerUseCamMaskOnOff = On;
      //MarkerIndices = ;
      //MarkerLabels = ;
      //MarkerFilterIndex = 0;
      //ProcessedDataFilterIndex = 0;
      //AnalogFilterIndex = -1;
      Filter =
      {
        AutomaticInitialConditionOnOff = On;
        FilterForwardBackwardOnOff = On;
        N = 2;
        Fc = {3};
        Type = LowPass;
      };
      //WeightThreshold = 0.0;
      //WeightOutput = {{0.0, 1.0}, {0.0, 1.0}, {0.0, 1.0}};
      //WeightTransitionTime = 0.1;
      //SearchAndReplace = ;
      //WriteMarkerDataToFilesOnOff = Off;
      //MarkerScaleXYZ = {0.025, 0.025, 0.025};
      MarkerRGB = {0, 0, 1};
      //MarkerDrawOnOff = On;
      //MarkerInterPolType = Bspline;
      //MarkerBsplineOrder = 4;
    };
    //# END SNIPPET 1

  };

//# BEGIN SNIPPET 2
// The study: Operations to be performed on the model
AnyBodyStudy MyStudy = {
  AnyFolder &Model = .MyModel;
  Gravity = {0.0, -9.81, 0.0};
  AnyIntVar FirstFrame = Main.MyModel.C3D.Header.FirstFrameNo;
  AnyIntVar LastFrame = Main.MyModel.C3D.Header.LastFrameNo;
  tStart = FirstFrame/Main.MyModel.C3D.Header.VideoFrameRate+2*Kinematics.ApproxVelAccPerturb;
  tEnd = LastFrame/Main.MyModel.C3D.Header.VideoFrameRate-2*Kinematics.ApproxVelAccPerturb;
};
//# END SNIPPET 2

};
