//expect_errors = ["<ObjectName>", "Model loading skipped"]

// This is a very simple model for demonstration of muscle modeling
Main = {

  AnyFolder MyModel = {
    // Global Reference Frame
    AnyFixedRefFrame GlobalRef = {
      AnyDrawRefFrame drw = {
        RGB = {1,0,0};
      };
      AnyRefNode M1Origin = {
        sRel = {0.0, 0.1, 0};
      };
    };  // Global reference frame

    // Define one simple segment
    AnySeg Arm = {
      r0 = {0.500000, 0.000000, 0.000000};
      Mass = 1.000000;
      Jii = {0.100000, 1.000000, 1.000000}*0.03;
      AnyRefNode Jnt = {
        sRel = {-0.5, 0.0, 0};
      };
      AnyRefNode M1Insertion = {
        sRel = {0.0, 0.1, 0};
      };
      AnyDrawSeg drw = {};
    };

    // Attach the segment to ground by a revolute joint
    AnyRevoluteJoint Jnt = {
      AnyRefFrame &ref1 = .GlobalRef;
      AnyRefFrame &ref2 = .Arm.Jnt;
      Axis = z;
    };

    // Drive the revolute joint at constant velocity
    AnyKinEqSimpleDriver Drv = {
      DriverPos = {-10*pi/180};
      DriverVel = {40*pi/180};
      AnyRevoluteJoint &Jnt = .Jnt;
      Reaction.Type = {Off};
    };

    AnyMuscleModel SimpleModel = {
      F0 = 100;
      //Lf0 = 0.0;
      //Vol0 = 0.0;
    };

//# BEGIN SNIPPET 1
AnyMuscleViaPoint Muscle1 = {
  AnyMuscleModel &Model = .SimpleModel;
  AnyRefFrame &Orig = .GlobalRef.M1Origin;
  AnyRefFrame &Ins = .Arm.M1Insertion;
  AnyDrawMuscle <ObjectName> =
  {
    //Visible = On;
    //Opacity = 1.0;
    //Pickable = On;
    //PickableZOrdering = 0;
    //RGB = ;
    //Transparency = 1.0;
    //DrawOnOff = 1.0;
    //Bulging = 0.0;
    //ColorScale = 0.0;
    //RGBColorScale = {0.95703125, 0.78515625, 0.78515625};
    //MaxStress = 250000.0;
    //DrawScaleOnOff = Off;
    /*DrawScale =
    {
    EnableCreasing = Off;
    CreasingAngle = 0.524;
    EnableWireframe = Off;
    EnableSmoothing = On;
    Param = 0.0;
    ParamArray = ;
    RGBArray = ;
    OpacityArray = ;
    };*/
    //AnyStyleDrawMaterial &<Insert name0> = <Insert object reference (or full object definition)>;
    //AnyStyleDrawMaterial &<Insert name1> = <Insert object reference (or full object definition)>; You can make any number of AnyStyleDrawMaterial objects!
  };
};
//# END SNIPPET 1

  }; // MyModel

  // The study: Operations to be performed on the model
  AnyBodyStudy MyStudy = {
    AnyFolder &Model = .MyModel;
    InverseDynamics.Criterion.Type = MR_MinMaxStrict;
    Gravity = {0.0, -9.81, 0.0};
  };
};  // Main
