// This is a very simple model for demonstration of muscle modeling
Main = {

  AnyFolder MyModel = {
    // Global Reference Frame
    AnyFixedRefFrame GlobalRef = {
      AnyDrawRefFrame drw = {
        RGB = {1,0,0};
      };
      AnyRefNode M1Origin = {
        sRel = {0.0, 0.1, 0};
      };
    };  // Global reference frame

    // Define one simple segment
    AnySeg Arm = {
      r0 = {0.500000, 0.000000, 0.000000};
      Mass = 1.000000;
      Jii = {0.100000, 1.000000, 1.000000}*0.03;
      AnyRefNode Jnt = {
        sRel = {-0.5, 0.0, 0};
      };
      AnyRefNode M1Insertion = {
        sRel = {0.0, 0.1, 0};
      };
      AnyDrawSeg drw = {};
    };

    // Attach the segment to ground by a revolute joint
    AnyRevoluteJoint Jnt = {
      AnyRefFrame &ref1 = .GlobalRef;
      AnyRefFrame &ref2 = .Arm.Jnt;
      Axis = z;
    };

//# BEGIN SNIPPET 2
// Drive the revolute joint at constant velocity
AnyKinEqSimpleDriver Drv = {
  DriverPos = {-10*pi/180};
  DriverVel = {80*pi/180};
  AnyRevoluteJoint &Jnt = .Jnt;
  Reaction.Type = {Off};
};
//# END SNIPPET 2

    AnyMuscleModel SimpleModel = {
      F0 = 100;
      //Lf0 = 0.0;
      //Vol0 = 0.0;
    };

    AnyMuscleViaPoint Muscle1 = {
      AnyMuscleModel &Model = .SimpleModel;
      AnyRefFrame &Orig = .GlobalRef.M1Origin;
      AnyRefFrame &Ins = .Arm.M1Insertion;
//# BEGIN SNIPPET 1
AnyDrawMuscle drw = {
  //RGB = {0.554688, 0.101563, 0.117188};
  //Opacity = 1.000000;
  //DrawOnOff = 1.000000;
  Bulging = 1;
  //ColorScale = 0.000000;
  //RGBColorScale = {0.957031, 0.785156, 0.785156};
  //MaxStress = 250000.000000;
};
//# END SNIPPET 1
    };

  }; // MyModel

  // The study: Operations to be performed on the model
  AnyBodyStudy MyStudy = {
    AnyFolder &Model = .MyModel;
    InverseDynamics.Criterion.Type = MR_MinMaxStrict;
    Gravity = {0.0, -9.81, 0.0};
  };
};  // Main
